/COM,===========================================================================
/COM,GEOMETRY
/COM,===========================================================================

/PREP7
/FOCUS,1,ball_centre_radius,0,0

*SET,ignore_ball,false
*SET,mirror_symmetry,false

/COM,---------------------------------------------------------------------------
/COM,DIMENSIONS
/COM,---------------------------------------------------------------------------

! Inner ring
*SET,inring_thickness      ,65.0*millimeter
*SET,inring_diameter_small ,150.0*millimeter
*SET,inring_diameter_groove,187.375*millimeter
*SET,inring_diameter_large ,206.4*millimeter
*SET,inring_groove_radius  ,24.41*millimeter
*SET,inring_groove_centre  ,inring_diameter_groove+2*inring_groove_radius
*SET,inring_groove_depth   ,(inring_diameter_large-inring_diameter_groove)/2
*SET,inring_groove_width   ,2*inring_groove_radius*SIN(ACOS(1-inring_groove_depth/inring_groove_radius))
*SET,inring_chamfer        ,4*millimeter

! Outer ring
*SET,outring_thickness      ,65.0*millimeter
*SET,outring_diameter_small ,265.3*millimeter
*SET,outring_diameter_groove,282.625*millimeter
*SET,outring_diameter_large ,320*millimeter
*SET,outring_groove_radius  ,24.65*millimeter
*SET,outring_groove_centre  ,outring_diameter_groove-2*outring_groove_radius
*SET,outring_groove_depth   ,(outring_diameter_groove-outring_diameter_small)/2
*SET,outring_groove_width   ,2*outring_groove_radius*SIN(ACOS(1-outring_groove_depth/outring_groove_radius))
*SET,outring_chamfer        ,4*millimeter

! Ball
*SET,ball_diameter,47.625*millimeter
*SET,ball_radius,ball_diameter/2
*SET,ball_centre_radius,(inring_diameter_groove+outring_diameter_groove)/4

! Sector
*SET,balls_count,9
*SET,ball_sector_angle,360/balls_count
*SET,half_sector_angle,ball_sector_angle/2

/COM,---------------------------------------------------------------------------
/COM,INNER RING
/COM,---------------------------------------------------------------------------

CSYS,1
NUMSTR,LINE,101 $ NUMSTR,AREA,101 $ NUMSTR,VOLU,101

*SET,meridian_angle,0
K,100,inring_groove_centre/2,meridian_angle,0
K,101,inring_diameter_groove/2,meridian_angle,0
K,102,inring_diameter_groove/4+inring_diameter_small/4,meridian_angle,0
K,103,inring_diameter_small/2,meridian_angle,0

K,104,inring_diameter_small/2,meridian_angle,inring_thickness/2-inring_chamfer
K,105,inring_diameter_small/2+inring_chamfer,meridian_angle,inring_thickness/2
K,106,inring_diameter_large/2-inring_chamfer,meridian_angle,inring_thickness/2
K,107,inring_diameter_large/2,meridian_angle,inring_thickness/2-inring_chamfer
K,108,inring_diameter_large/2,meridian_angle,inring_groove_width/2
K,109,inring_diameter_small/4+inring_diameter_large/4,meridian_angle,inring_groove_width/4+inring_thickness/4-inring_chamfer/2
LARC,108,101,100,inring_groove_radius

K,114,inring_diameter_small/2,meridian_angle,-inring_thickness/2+inring_chamfer
K,115,inring_diameter_small/2+inring_chamfer,meridian_angle,-inring_thickness/2
K,116,inring_diameter_large/2-inring_chamfer,meridian_angle,-inring_thickness/2
K,117,inring_diameter_large/2,meridian_angle,-inring_thickness/2+inring_chamfer
K,118,inring_diameter_large/2,meridian_angle,-inring_groove_width/2
K,119,inring_diameter_small/4+inring_diameter_large/4,meridian_angle,-(inring_groove_width/4+inring_thickness/4-inring_chamfer/2)
LARC,118,101,100,inring_groove_radius

/COM,---------------------------------------------------------------------------

*SET,meridian_angle,half_sector_angle/3
K,120,inring_groove_centre/2,meridian_angle,0
K,121,inring_diameter_groove/2,meridian_angle,0
K,122,inring_diameter_groove/4+inring_diameter_small/4,meridian_angle,0
K,123,inring_diameter_small/2,meridian_angle,0

K,124,inring_diameter_small/2,meridian_angle,inring_thickness/2-inring_chamfer
K,125,inring_diameter_small/2+inring_chamfer,meridian_angle,inring_thickness/2
K,126,inring_diameter_large/2-inring_chamfer,meridian_angle,inring_thickness/2
K,127,inring_diameter_large/2,meridian_angle,inring_thickness/2-inring_chamfer
K,128,inring_diameter_large/2,meridian_angle,inring_groove_width/2
K,129,inring_diameter_small/4+inring_diameter_large/4,meridian_angle,inring_groove_width/4+inring_thickness/4-inring_chamfer/2
LARC,128,121,120,inring_groove_radius

K,134,inring_diameter_small/2,meridian_angle,-inring_thickness/2+inring_chamfer
K,135,inring_diameter_small/2+inring_chamfer,meridian_angle,-inring_thickness/2
K,136,inring_diameter_large/2-inring_chamfer,meridian_angle,-inring_thickness/2
K,137,inring_diameter_large/2,meridian_angle,-inring_thickness/2+inring_chamfer
K,138,inring_diameter_large/2,meridian_angle,-inring_groove_width/2
K,139,inring_diameter_small/4+inring_diameter_large/4,meridian_angle,-(inring_groove_width/4+inring_thickness/4-inring_chamfer/2)
LARC,138,121,120,inring_groove_radius

/COM,---------------------------------------------------------------------------

*SET,meridian_angle,half_sector_angle
K,140,inring_groove_centre/2,meridian_angle,0
K,141,inring_diameter_groove/2,meridian_angle,0
K,142,inring_diameter_groove/4+inring_diameter_small/4,meridian_angle,0
K,143,inring_diameter_small/2,meridian_angle,0

K,144,inring_diameter_small/2,meridian_angle,inring_thickness/2-inring_chamfer
K,145,inring_diameter_small/2+inring_chamfer,meridian_angle,inring_thickness/2
K,146,inring_diameter_large/2-inring_chamfer,meridian_angle,inring_thickness/2
K,147,inring_diameter_large/2,meridian_angle,inring_thickness/2-inring_chamfer
K,148,inring_diameter_large/2,meridian_angle,inring_groove_width/2
K,149,inring_diameter_small/4+inring_diameter_large/4,meridian_angle,inring_groove_width/4+inring_thickness/4-inring_chamfer/2
LARC,148,141,140,inring_groove_radius

K,154,inring_diameter_small/2,meridian_angle,-inring_thickness/2+inring_chamfer
K,155,inring_diameter_small/2+inring_chamfer,meridian_angle,-inring_thickness/2
K,156,inring_diameter_large/2-inring_chamfer,meridian_angle,-inring_thickness/2
K,157,inring_diameter_large/2,meridian_angle,-inring_thickness/2+inring_chamfer
K,158,inring_diameter_large/2,meridian_angle,-inring_groove_width/2
K,159,inring_diameter_small/4+inring_diameter_large/4,meridian_angle,-(inring_groove_width/4+inring_thickness/4-inring_chamfer/2)
LARC,158,141,140,inring_groove_radius

/COM,---------------------------------------------------------------------------

V,101,102,109,108, 121,122,129,128 $ V,101,102,119,118, 121,122,139,138
V,102,103,104,109, 122,123,124,129 $ V,102,103,114,119, 122,123,134,139
V,104,105,106,109, 124,125,126,129 $ V,114,115,116,119, 134,135,136,139
V,106,107,108,109, 126,127,128,129 $ V,116,117,118,119, 136,137,138,139

V,121,122,129,128, 141,142,149,148 $ V,121,122,139,138, 141,142,159,158
V,122,123,124,129, 142,143,144,149 $ V,122,123,134,139, 142,143,154,159
V,124,125,126,129, 144,145,146,149 $ V,134,135,136,139, 154,155,156,159
V,126,127,128,129, 146,147,148,149 $ V,136,137,138,139, 156,157,158,159
VATT,CrMnSi

! /COM,---------------------------------------------------------------------------
! /COM,OUTER RING
! /COM,---------------------------------------------------------------------------

CSYS,1
NUMSTR,LINE,201 $ NUMSTR,AREA,201 $ NUMSTR,VOLU,201

*SET,meridian_angle,0
K,200,outring_groove_centre/2,meridian_angle,0
K,201,outring_diameter_groove/2,meridian_angle,0
K,202,outring_diameter_groove/4+outring_diameter_large/4,meridian_angle,0
K,203,outring_diameter_large/2,meridian_angle,0
K,204,outring_diameter_large/2,meridian_angle,outring_thickness/2-outring_chamfer
K,205,outring_diameter_large/2-outring_chamfer,meridian_angle,outring_thickness/2
K,206,outring_diameter_small/2+outring_chamfer,meridian_angle,outring_thickness/2
K,207,outring_diameter_small/2,meridian_angle,outring_thickness/2-outring_chamfer
K,208,outring_diameter_small/2,meridian_angle,outring_groove_width/2
K,209,outring_diameter_small/4+outring_diameter_large/4,meridian_angle,outring_groove_width/4+outring_thickness/4-outring_chamfer/2
LARC,201,208,200,outring_groove_radius

*SET,meridian_angle,half_sector_angle/3
K,210,outring_groove_centre/2,meridian_angle,0
K,211,outring_diameter_groove/2,meridian_angle,0
K,212,outring_diameter_groove/4+outring_diameter_large/4,meridian_angle,0
K,213,outring_diameter_large/2,meridian_angle,0
K,214,outring_diameter_large/2,meridian_angle,outring_thickness/2-outring_chamfer
K,215,outring_diameter_large/2-outring_chamfer,meridian_angle,outring_thickness/2
K,216,outring_diameter_small/2+outring_chamfer,meridian_angle,outring_thickness/2
K,217,outring_diameter_small/2,meridian_angle,outring_thickness/2-outring_chamfer
K,218,outring_diameter_small/2,meridian_angle,outring_groove_width/2
K,219,outring_diameter_small/4+outring_diameter_large/4,meridian_angle,outring_groove_width/4+outring_thickness/4-outring_chamfer/2
LARC,211,218,210,outring_groove_radius

*SET,meridian_angle,half_sector_angle
K,220,outring_groove_centre/2,meridian_angle,0
K,221,outring_diameter_groove/2,meridian_angle,0
K,222,outring_diameter_groove/4+outring_diameter_large/4,meridian_angle,0
K,223,outring_diameter_large/2,meridian_angle,0
K,224,outring_diameter_large/2,meridian_angle,outring_thickness/2-outring_chamfer
K,225,outring_diameter_large/2-outring_chamfer,meridian_angle,outring_thickness/2
K,226,outring_diameter_small/2+outring_chamfer,meridian_angle,outring_thickness/2
K,227,outring_diameter_small/2,meridian_angle,outring_thickness/2-outring_chamfer
K,228,outring_diameter_small/2,meridian_angle,outring_groove_width/2
K,229,outring_diameter_small/4+outring_diameter_large/4,meridian_angle,outring_groove_width/4+outring_thickness/4-outring_chamfer/2
LARC,221,228,220,outring_groove_radius

V,202,203,204,209,212,213,214,219 $ V,212,213,214,219,222,223,224,229
V,209,204,205,206,219,214,215,216 $ V,219,214,215,216,229,224,225,226
V,206,207,208,209,216,217,218,219 $ V,216,217,218,219,226,227,228,229
V,201,202,209,208,211,212,219,218 $ V,211,212,219,218,221,222,229,228
VATT,CrMnSi

*IF,mirror_symmetry,EQ,false,THEN

CSYS,1
NUMSTR,LINE,501 $ NUMSTR,AREA,501 $ NUMSTR,VOLU,501

*SET,meridian_angle,0
K,500,outring_groove_centre/2,meridian_angle,0
K,501,outring_diameter_groove/2,meridian_angle,0
K,502,outring_diameter_groove/4+outring_diameter_large/4,meridian_angle,0
K,503,outring_diameter_large/2,meridian_angle,0
K,504,outring_diameter_large/2,meridian_angle,-outring_thickness/2+outring_chamfer
K,505,outring_diameter_large/2-outring_chamfer,meridian_angle,-outring_thickness/2
K,506,outring_diameter_small/2+outring_chamfer,meridian_angle,-outring_thickness/2
K,507,outring_diameter_small/2,meridian_angle,-outring_thickness/2+outring_chamfer
K,508,outring_diameter_small/2,meridian_angle,-outring_groove_width/2
K,509,outring_diameter_small/4+outring_diameter_large/4,meridian_angle,-(outring_groove_width/4+outring_thickness/4-outring_chamfer/2)
LARC,201,508,200,outring_groove_radius

*SET,meridian_angle,half_sector_angle/3
K,510,outring_groove_centre/2,meridian_angle,0
K,511,outring_diameter_groove/2,meridian_angle,0
K,512,outring_diameter_groove/4+outring_diameter_large/4,meridian_angle,0
K,513,outring_diameter_large/2,meridian_angle,0
K,514,outring_diameter_large/2,meridian_angle,-outring_thickness/2+outring_chamfer
K,515,outring_diameter_large/2-outring_chamfer,meridian_angle,-outring_thickness/2
K,516,outring_diameter_small/2+outring_chamfer,meridian_angle,-outring_thickness/2
K,517,outring_diameter_small/2,meridian_angle,-outring_thickness/2+outring_chamfer
K,518,outring_diameter_small/2,meridian_angle,-outring_groove_width/2
K,519,outring_diameter_small/4+outring_diameter_large/4,meridian_angle,-(outring_groove_width/4+outring_thickness/4-outring_chamfer/2)
LARC,211,518,210,outring_groove_radius

*SET,meridian_angle,half_sector_angle
K,520,outring_groove_centre/2,meridian_angle,0
K,521,outring_diameter_groove/2,meridian_angle,0
K,522,outring_diameter_groove/4+outring_diameter_large/4,meridian_angle,0
K,523,outring_diameter_large/2,meridian_angle,0
K,524,outring_diameter_large/2,meridian_angle,-outring_thickness/2+outring_chamfer
K,525,outring_diameter_large/2-outring_chamfer,meridian_angle,-outring_thickness/2
K,526,outring_diameter_small/2+outring_chamfer,meridian_angle,-outring_thickness/2
K,527,outring_diameter_small/2,meridian_angle,-outring_thickness/2+outring_chamfer
K,528,outring_diameter_small/2,meridian_angle,-outring_groove_width/2
K,529,outring_diameter_small/4+outring_diameter_large/4,meridian_angle,-(outring_groove_width/4+outring_thickness/4-outring_chamfer/2)
LARC,221,528,220,outring_groove_radius

V,202,203,504,509, 212,213,514,519 $ V,212,213,514,519, 222,223,524,529
V,509,504,505,506, 519,514,515,516 $ V,519,514,515,516, 529,524,525,526
V,506,507,508,509, 516,517,518,519 $ V,516,517,518,519, 526,527,528,529
V,201,202,509,508, 211,212,519,518 $ V,211,212,519,518, 221,222,529,528
VATT,CrMnSi

*ENDIF

/COM,---------------------------------------------------------------------------
/COM,BALL
/COM,---------------------------------------------------------------------------

*IF,ignore_ball,EQ,false,THEN

LOCAL,300,SPHE,ball_centre_radius,0,0,0,0
K,3000,0,0,0

K,3111,ball_diameter/4,  0, 90 $ K,3211,ball_diameter/2,  0, 90
K,3112,ball_diameter/4,  0, 50 $ K,3212,ball_diameter/2,  0, 50
K,3113,ball_diameter/4,  0,  0 $ K,3213,ball_diameter/2,  0,  0
K,3114,ball_diameter/4,  0,-50 $ K,3214,ball_diameter/2,  0,-50
K,3115,ball_diameter/4,  0,-90 $ K,3215,ball_diameter/2,  0,-90
K,3122,ball_diameter/4, 40, 50 $ K,3222,ball_diameter/2, 40, 50
K,3123,ball_diameter/4, 40,  0 $ K,3223,ball_diameter/2, 40,  0
K,3124,ball_diameter/4, 40,-50 $ K,3224,ball_diameter/2, 40,-50
K,3132,ball_diameter/4, 90, 50 $ K,3232,ball_diameter/2, 90, 50
K,3133,ball_diameter/4, 90,  0 $ K,3233,ball_diameter/2, 90,  0
K,3134,ball_diameter/4, 90,-50 $ K,3234,ball_diameter/2, 90,-50
K,3142,ball_diameter/4,140, 50 $ K,3242,ball_diameter/2,140, 50
K,3143,ball_diameter/4,140,  0 $ K,3243,ball_diameter/2,140,  0
K,3144,ball_diameter/4,140,-50 $ K,3244,ball_diameter/2,140,-50
K,3152,ball_diameter/4,180, 50 $ K,3252,ball_diameter/2,180, 50
K,3153,ball_diameter/4,180,  0 $ K,3253,ball_diameter/2,180,  0
K,3154,ball_diameter/4,180,-50 $ K,3254,ball_diameter/2,180,-50

NUMSTR,LINE,301 $ NUMSTR,AREA,301 $ NUMSTR,VOLU,301
VSEL,NONE

CSKP,300,SPHE,3000,3113,3133
V, 3113,3123,3122,3112, 3213,3223,3222,3212
V, 3123,3133,3132,3122, 3223,3233,3232,3222
V, 3133,3143,3142,3132, 3233,3243,3242,3232
V, 3143,3153,3152,3142, 3243,3253,3252,3242
CSKP,300,SPHE,3000,3113,3111
V, 3000,3113,3112,3111, 3133,3123,3122,3132
V, 3111,3112,3212,3211, 3132,3122,3222,3232
V, 3000,3133,3132,3111, 3153,3143,3142,3152
V, 3111,3211,3232,3132, 3152,3252,3242,3142

*IF,mirror_symmetry,EQ,false,THEN

CSKP,300,SPHE,3000,3153,3133
V, 3153,3143,3144,3154, 3253,3243,3244,3254
V, 3143,3133,3134,3144, 3243,3233,3234,3244
V, 3133,3123,3124,3134, 3233,3223,3224,3234
V, 3123,3113,3114,3124, 3223,3213,3214,3224
CSKP,300,SPHE,3000,3153,3115
V, 3000,3153,3154,3115, 3133,3143,3144,3134
V, 3115,3154,3254,3215, 3134,3144,3244,3234
V, 3000,3113,3114,3115, 3133,3123,3124,3134
V, 3115,3114,3214,3215, 3134,3124,3224,3234

*ENDIF ! mirror_symmetry,EQ,true

VATT,Si3N4

*ENDIF ! ignore_ball,EQ,false

/COM,---------------------------------------------------------------------------
/COM,COMPONENTS
/COM,---------------------------------------------------------------------------

CSYS,1
ALLSEL,ALL
VPLOT

! Inner ring volume
VSEL,S,VOLU,,100,199
CM,inring_volume,VOLU

! Ball volume
VSEL,S,VOLU,,300,399
CM,ball_volume,VOLU

! Outer ring volume
VSEL,S,VOLU,,200,299
VSEL,A,VOLU,,500,599
CM,outring_volume,VOLU

! Inner ring contact surface facing ball
ASEL,S,AREA,,105,110,5
CM,inring_facing_ball,AREA

! Ball contact surface facing inner ring
ASEL,S,AREA,,321,338,17
CM,ball_facing_inring,AREA

! Ball contact surface facing outer ring
ASEL,S,AREA,,306,350,44
CM,ball_facing_outring,AREA

! Outer ring contact surface facing ball
ASEL,S,AREA,,232,529,297
CM,outring_facing_ball,AREA
